Um := 0.8
a2 := 2.9
a1 := 0.85
a0 := 1
K := 2
T := [153; 21.25; 17.21; 13.94; 11.29; 9.14; 7.4; 5.99; 4.85; 3.93; 3.14; 2.54; 2.06; 1.67; 1.35]
Xm := [1.61; 2.03; 2.33; 2.85; 3.3; 2.31; 1.22; 0.68; 0.4; 0.24; 0.15; 0.095; 0.061; 0.04; 0.026]
ΔT := [0.86; 1.1; 1.28; 1.67; 2.45; 3.11; 3.01; 2.63; 2.21; 1.83; 1.49; 1.22; 1; 0.812; 0.66]
ω := 2*π/T
ω = [0.0410666; 0.295679; 0.365089; 0.450731; 0.556527; 0.687438; 0.849079; 1.04895; 1.2955; 1.59877; 2.00101; 2.4737; 3.05009; 3.76239; 4.65421]
A := Xm/Um
A = [2.0125; 2.5375; 2.9125; 3.5625; 4.125; 2.8875; 1.525; 0.85; 0.5; 0.3; 0.1875; 0.11875; 0.07625; 0.05; 0.0325]
φ := -ΔT/T*360
φ = [-2.02353; -18.6353; -26.7751; -43.1277; -78.1222; -122.495; -146.432; -158.063; -164.041; -167.634; -170.828; -172.913; -174.757; -175.042; -176]
L := 20*log(A)
L = [6.07472; 8.08812; 9.28532; 11.0351; 12.3085; 9.21044; 3.6654; -1.41162; -6.0206; -10.4576; -14.54; -18.5073; -22.3552; -26.0206; -29.7623]
W(p) := K/(a2*p^2 + a1*p + a0) → 2/(2.9*p^2 + .85*p + 1)
W(1i*w) → 2/((-2.9)*w^2 + .85*1i*w + 1)
A1(w) := |W(1i*w)| → 2/(((-2.9)*w^2 + 1)^2 + .7225*w^2)^(1/2)
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W(1i*w) complex → ((-5.8)*w^2 + 2)/(((-2.9)*w^2 + 1)^2 + .7225*w^2) - 1.70*1i*w/(((-2.9)*w^2 + 1)^2 + .7225*w^2)
U(w) := ((-5.8)*w^2 + 2)/(((-2.9)*w^2 + 1)^2 + .7225*w^2)
V(w) := 1.7*w/(((-2.9)*w^2 + 1)^2 + .7225*w^2)
φ1(w) :=
    -360/(2*π)*atan(V(w)/U(w)) if U(w) > 0
    -180 + (-360/(2*π)*atan(V(w)/U(w))) if U(w) < 0
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W1 := cos(φ/(360/(2*π))) + 1i*sin(φ/(360/(2*π)))
W1 = [0.999376 - 0.0353099i; 0.947572 - 0.319543i; 0.892781 - 0.45049i; 0.729832 - 0.683627i; 0.205824 - 0.978589i; -0.537219 - 0.843443i; -0.833234 - 0.55292i; -0.927598 - 0.37358i; -0.96146 - 0.274945i; -0.976798 - 0.214163i; -0.987214 - 0.159398i; -0.992361 - 0.12337i; -0.995817 - 0.0913751i; -0.996258 - 0.0864269i; -0.997564 - 0.0697565i]
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L1(w) := 20*log(A1(w))
L2(w) := 20*log(φ1(w))
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